VAX := READPRN("C:\Users\Honor\Desktop\ОЭ\lab_1\circuit1.DNO")
VAX = [
    0, 0;
    0.019996, 8e-6;
    0.039992, 1.6e-5;
    0.059988, 2.4e-5;
    0.079984, 3.2e-5;
    0.09998, 4e-5;
    0.119976, 4.8e-5;
    0.139972, 5.6e-5;
    0.159968, 6.4e-5;
    0.179964, 7.2e-5
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]
VAX[:, 0] = [
    0; 0.019996; 0.039992; 0.059988; 0.079984; 0.09998; 0.119976; 0.139972; 0.159968; 0.179964
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]
VAX[:, 1] = [
    0; 8e-6; 1.6e-5; 2.4e-5; 3.2e-5; 4e-5; 4.8e-5; 5.6e-5; 6.4e-5; 7.2e-5
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]
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Id3 := max(VAX[:, 1])
Id3 = 0.0334485
Ud3 := VAX[:, 0][50]
nMax := match(Id3, VAX[:, 1])
Ud3 = 0.966745
nMax = [50]
nId1 := match(Id3/4, VAX[:, 1])
nId2 := match(Id3/2, VAX[:, 1])
nId1 = [36]
nId2 = [41]
Ud1 := linterp(VAX[:, 1], VAX[:, 0], Id3/4)
Ud1 = 0.717593
Id1 := Id3/4
Id1 = 0.00836212
Ud2 := linterp(VAX[:, 1], VAX[:, 0], Id3/2)
Ud2 = 0.806939
Id2 := Id3/2
Id2 = 0.0167242
Rb := (Ud1 - 2*Ud2 + Ud3)/Id1
Rb = 8.42607
NFt := ((3*Ud2 - 2*Ud1) - Ud3)/ln(2)
NFt = 0.0272471
Is0 := Id1*exp((Ud3 - 2*Ud2)/NFt)
Is0 = 4.05111e-13
Rb := 1
Is0 := 10^-10
m := 2
Ft := 0.02
Uk := Ik*Rb + ln((Is0 + Ik)/Is0)*m*Ft  # error: Эта переменная не определена.
Given
0.55962 == 0.0004949*Rb + ln((Is0 + 0.0004949)/Is0)*m*Ft
0.61833 == 0.0017896*Rb + ln((Is0 + 0.0017896)/Is0)*m*Ft
0.65639 == 0.0037371*Rb + ln((Is0 + 0.0037371)/Is0)*m*Ft
0.69375 == 0.006393*Rb + ln((Is0 + 0.006393)/Is0)*m*Ft
Diod_P := Minerr(Is0, Rb, m, Ft)
Diod_P = [3.31662e-10; 5.64847; 2.07355; 0.0188971]
Rb := Diod_P[1]
NFt := Diod_P[2]*Diod_P[3]
Is0 := Diod_P[0]
Idiod := 0, 10^-5 .. 0.055
Udiod(Idiod) := Idiod*Rb + NFt*ln((Idiod + Is0)/Is0)
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Rb1 := 1.2
NFt1 := 0.0255
Is01 := 22.7*10^6
Idiod := 0, 10^-5 .. 0.055
Uformula(Idiod) := Idiod*Rb1 + NFt1*ln((Idiod + Is01)/Is01)
Idiod := VAX[:, 1]
VAX[:, 0][45] = 0.876354
Iproverka := VAX[:, 1][45]
VAX[:, 1][45] = 0.0238211
Uformula(Iproverka) = 0.0285853
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