i := 0 .. 2
X := [331281, -1; 384154, -4; 406523, -7]
Fmax := X[:, 0]
Vvar := X[:, 1]
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Lk := 10^-3
Ck := 10^-10
pi := 3.14
Fr == 1/(2*pi*sqrt((Ck + Cd)*Lk))
Fr[i] := Fmax[i]
Cd[i] := (1/(4*Fr[i]^2*pi^2*Lk)) - Ck
Cd = [1.3104e-10; 7.18185e-11; 5.34301e-11]
Vvar = [-1; -4; -7]
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M := 0.5
VJ0 := 0.6
CJ0 := 10^-12
Given
1.31*10^-10 == CJ0*(1 - (-1/VJ0))^(-M)
7.182*10^-11 == CJ0*(1 - (-4/VJ0))^(-M)
5.343*10^-11 == CJ0*(1 - (-7/VJ0))^(-M)
Res := Minerr(CJ0, VJ0, M) = [2.17006e-10; 0.76961; 0.606184]
CJ0 := Res[0]
VJ0 := Res[1]
M := Res[2]
CJ0 = 2.17006e-10
VJ0 = 0.76961
M = 0.606184
Cd1 := CJ0*(1 - Vvar/VJ0)^(-M) = [1.31e-10; 7.182e-11; 5.343e-11]
Cd = [1.3104e-10; 7.18185e-11; 5.34301e-11]
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