X := READPRN("C:\Users\Honor\Desktop\ОЭ\lab_3\Design2.dlm")
X[:, 0] := sort(X[:, 0])
X[:, 1] := sort(X[:, 1])
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X := READPRN("C:\Users\Honor\Desktop\ОЭ\lab_3\Design2.dlm")
Rb := 6.648
Ft := 0.019
m := 2.074
Is0 := 3.317*10^-10
Given
[0.025] == [[1.173*10^-6]]*Rb + ln((Is0 + [1.173*10^-6])/Is0)*m*Ft
[0.045] == [1.195*10^-6]*Rb + ln((Is0 + [1.195*10^-6])/Is0)*m*Ft
[0.065] == [1.216*10^-6]*Rb + ln((Is0 + [1.216*10^-6])/Is0)*m*Ft
[0.094] == [1.237*10^-6]*Rb + ln((Is0 + [1.237*10^-6])/Is0)*m*Ft
Diod_P := Minerr(Is0, Rb, m, Ft)
Diod_P = [3.317e-10; 6.648; 2.074; 0.019]
