X := READPRN("C:\Users\Honor\Desktop\ОЭ\lab_4\pick.txt")
Fmax := X[:, 1]
Vvar := X[:, 0]
i := 0 .. 4
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Vvar = [-1; -2; -3; -4; -5]
Fmax = [331570; 356461; 372641; 384309; 393410]
Fr == 1/(2*pi*sqrt((Ck + Cd)*Lk))
Fr[i] := Fmax[i]
Lk := 10^-3
Ck := 100*10^-12
pi := 3.14
Vvar = [-1; -2; -3; -4; -5]
Cd := -(Ck*Lk - 1/(4*Fr^2*pi^2))/Lk = [1.30638e-10; 9.95523e-11; 8.25994e-11; 7.168e-11; 6.38287e-11]
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M := 0.5
VJ0 := 0.6
CJ0 := 10^-12
Given
1.306*10^-10 == CJ0*(1 - (-1/VJ0))^(-M)
9.955*10^-11 == CJ0*(1 - (-2/VJ0))^(-M)
8.26*10^-11 == CJ0*(1 - (-3/VJ0))^(-M)
7.168*10^-11 == CJ0*(1 - (-4/VJ0))^(-M)
6.383*10^-11 == CJ0*(1 - (-5/VJ0))^(-M)
Minerr(CJ0, VJ0, M) = [2.16555e-10; 0.763877; 0.6043]
