Ek := 10
BF := 167.182
Ik := 31*10^-3
Ub := 595.934*10^-3
Ud := Ek
Urt := 5
Rk := (Ek - Urt)/Ik = 161.29
Ib := Ik/BF = 0.000185427
Rb := (Ek - Ub)/Ib = 50715.8
R3 := Ud/(10*Ib) = 5392.97
Rd := 1000
Given
Rb + Rd == 5.393*10^3
Rb/Rd == 9
R1 := 4854
Minerr(Rd, Rb) = [539.3; 4853.7]
R3 := 539
